r := 0.5
p1 := 0.6
p2 := 0.4
nr := 1 - r
np1 := 1 - p1
np2 := 1 - p2
p001 := 0
p201 := 0
p010 := 0
p110 := 0
p011 := 0
p111 := 0
p101 := 0
Given
p001 == r*p2*p001 + r*np2*p201 + r*np1*np2*p101 + r*np1*p2*p111
p201 == p2*p201 + np1*p2*p101
p010 == r*p010 + r*np2*p011
p110 == p1*p110 + nr*p010 + nr*np2*p011 + p1*np2*p111
p011 == r*np2*p001 + r*p2*p011 + r*np1*np2*p111 + r*np1*p110
p111 == nr*np2*p001 + nr*np1*p110 + nr*p2*p011 + p1*np2*p101 + (nr*np1*np2 + p1*p2)*p111
p101 == r*np2*p001 + nr*np2*p201 + (p1*p2 + nr*np1*np2)*p101 + nr*np1*p2*p111
p001 + p201 + p010 + p110 + p011 + p111 + p101 == 1
res := Find(p001, p201, p010, p110, p011, p111, p101)
res = [0.0339255; 0.0122605; 0.091615; 0.432611; 0.154227; 0.226202; 0.0491583]
P001 := res[0]
P201 := res[1]
P010 := res[2]
P110 := res[3]
P011 := res[4]
P111 := res[5]
P101 := res[6]
Aval := (1 - P110 - P010)*np2 = 0.285465
Pblock := P201 = 0.0122605
Q := Aval*2 = 0.570929
Prefuse := 1 - Q = 0.429071
Lqueue := P001 + P201 + P101 = 0.0953444
Lc := 1*P001 + 3*P201 + P110 + P011 + 2*P111 + 3*P101 = 1.25742
Wc := Lc/Aval = 4.40483
Wqueue := Lqueue/Aval = 0.333997
